*Heading
** Job name: ERMUncFEModelInp Model name: Model-1
** Generated by: Abaqus/CAE 2021
*Preprint, echo=NO, model=NO, history=NO, contact=NO
**
** PARTS
**
*Part, name=Part-1
*Node
      1,           5.,           9.
      2,          -5.,           9.
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*Element, type=CPS4R
   1,    1,    7,  611,  336
   2,    7,    8,  612,  611
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*Nset, nset=Set-1, generate
     1,  14898,      1
*Elset, elset=Set-1, generate
     1,  14630,      1
** Section: Section-1
*Solid Section, elset=Set-1, material=Material-1
,
*End Part
**
**
** ASSEMBLY
**
*Assembly, name=Assembly
**
*Instance, name=Part-1-1, part=Part-1
*End Instance
**
*Nset, nset=CoordNodes, instance=Part-1-1
    45,   209,   474,   649,   725,   801
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*Nset, nset=MidNode, instance=Part-1-1
 3612,
*Nset, nset=NALL, instance=Part-1-1, generate
     1,  14898,      1
*Elset, elset=StressElements, instance=Part-1-1, generate
    39,  14592,     77
*End Assembly
**
** INITIAL CONDITIONS
**
*INITIAL CONDITIONS, TYPE= TEMPERATURE
NALL, 0.000
*INITIAL CONDITIONS, TYPE= SOLUTION, USER
**
** MATERIALS
**
*Material, name=Material-1
*Elastic
210000., 0.3
** UEXPAN CALL
**
*Expansion, user, type=ortho
*DEPVAR
6
** BOUNDARY CONDITIONS
**
** Name: BC-1 Type: Symmetry/Antisymmetry/Encastre
*Boundary
MidNode, ENCASTRE
*AMPLITUDE, NAME=TEMP_CURV,TIME=STEP TIME, VALUE=ABSOLUTE
0.0, 0.0, 1.0, 1.0
**
** STEP: Step-1
**
*Step, name=Step-1, nlgeom=YES
*Static
0.1, 1., 1e-05, 1.
*TEMPERATURE, AMPLITUDE=TEMP_CURV
NALL, 1.0
**
**//////////////////////////////////////////
**////           OUTPUT FILES           ////
**//////////////////////////////////////////
**
**   Variables to print in results file   **
**                                        **
**----------------------------------------**
*el print, elset=StressElements, f=1
coord,
s,
e,
the,
temp,
sdv,
*node print, nset=CoordNodes, f=1
coord,
u,
rf,
*el file, elset=StressElements
coord,
s,
e,
the,
temp,
sdv,
*OUTPUT,FIELD
*ELEMENT OUTPUT
coord,
s,
e,
the,
temp,
sdv,
*node file, nset=CoordNodes
coord,
u,
rf,
*OUTPUT,FIELD
*NODE OUTPUT
coord,
u,
rf,
*endstep
